# LAMMPS NVT Nose-Hoover reference for kUPS md_nvt_lj_argon.

units metal
atom_style atomic
boundary p p p
read_data inputs/host/argon_fcc_lammps.data

pair_style lj/cut 10.0
pair_coeff 1 1 0.01032356174398622 3.405 10.0
pair_modify shift no tail no

neighbor 2.0 bin
neigh_modify every 1 delay 0 check yes

timestep 0.002
velocity all create 100.0 42 mom yes rot no dist gaussian

fix ensemble all nvt temp 100.0 100.0 0.1

thermo 1000
thermo_style custom step temp pe ke etotal press vol
thermo_modify norm no flush yes

run 10000
reset_timestep 0

variable s equal step
variable t equal temp
variable pe_ equal pe
variable ke_ equal ke
variable etot equal etotal
variable p equal press
variable v equal vol

fix obs all print 1 "${s} ${t} ${pe_} ${ke_} ${etot} ${p} ${v}" file outputs/reference/md_nvt_lj_argon_lammps.dat screen no title "step temp pe ke etotal press_bar volume"

run 20000

unfix obs
